package kokkos neigh half
units           metal
boundary        p p p
atom_style      atomic
newton          on
read_data       ../structures/Mo4Ni4.data
replicate       ${nx} ${nx} ${nx}
pair_style snap
pair_coeff      * * Ni_Mo.snapcoeff Ni_Mo.snapparam Mo Ni
mass            1 95.94
mass            2 58.69

neighbor        2.0 bin
neigh_modify	delay 0 every 5 check yes
fix             1 all nvt temp 300.0 300.0 0.1
velocity        all create 300.0 12345 dist gaussian
thermo_style    custom step cpu etotal vol pxx pyy pzz
thermo          10
timestep        0.001
run             100
